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/batch
! ANSYS input file written by Workbench version 19.2 RELEASE
! File used for geometry attach: D:\Documents\HIAST\5th year\5th Year Project\Structural Analysis\2DoFAssembled.STEP
/title,StructuralAnalysis--Static Structural (D5)
/com,--- Data in consistent NMM units. See Solving Units in the help system for more information.
/units,MPA
/prep7
! Turn off shape checking because checks already performed inside WB mesher.
! See help system for more information.
SHPP,OFF,,NOWARN
etcon,set             ! allow ANSYS to choose best KEYOP's for 180x elements
/com,*********** Nodes for the whole assembly ***********
nblock,3,,4158
(1i9,3e20.9e3)
     8121     4.250000000E+01     0.000000000E+00    -6.915000000E+01
     8122     4.250000000E+01     0.000000000E+00    -6.585000000E+01
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-1
/com,*********** Elements for Body 1 "Base" ***********
et,1,187
eblock,19,solid,,1784
(19i9)
        1        1        1        1        0        0        0        0       10        0     4248     8181     8461     8468     8774     9191    10797     9192     9197
    10799    10824
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-1
/com,*********** Send User Defined Coordinate System(s) ***********
csys,0
toffst,273.15,  ! Temperature offset from absolute zero
/com,*********** Set Reference Temperature ***********
tref,22.
/com,*********** Send Materials ***********
Temperature = 'TEMP' ! Temperature
MP,EX,1,2410,	! tonne s^-2 mm^-1
MP,NUXY,1,0.01,

!************************* Model Summary ********************
!Base,	PLA,	matid,	1
!************************* End Model Summary ********************
/com,*********** Fixed Supports ***********
CMBLOCK,_FIXEDSU,NODE,      366
(8i10)
      8121      8122      8123      8124      8129      8130      8131      8132
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cmsel,s,_FIXEDSU
d,all,all
nsel,all
/com,*********** Define Force Using Surface Effect Elements ***********
local,12,0,0.,0.,0.,0.,0.,0.
csys,0
et,2,154
eblock,10,,,116
(15i9)
     6032        2        2        2       12     8198     8427     8223     8223     9312     9494     8223     9310
     6033        2        2        2       12     8198     8223     8224     8224     9310     9491     8224     9311
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-1
esel,s,type,,2
keyop,2,2,1                ! Apply load in local coordinate system
keyop,2,7,1                ! Use original area so load is constant in large deformation
keyop,2,11,2               ! Use real and not project area
esel,all
/com,*********** Define Force Using Surface Effect Elements ***********
local,13,0,0.,0.,0.,0.,0.,0.
csys,0
et,3,154
eblock,10,,,120
(15i9)
     6148        3        3        3       13     8450     8451     8463     8463    10728    10738     8463    10729
     6149        3        3        3       13     8181     8468     8461     8461     9192    10797     8461     9191
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-1
esel,s,type,,3
keyop,3,2,1                ! Apply load in local coordinate system
keyop,3,7,1                ! Use original area so load is constant in large deformation
keyop,3,11,2               ! Use real and not project area
esel,all
fini
/com,****************************************************************************
/com,*************************    SOLUTION       ********************************
/com,****************************************************************************
/solu
antype,0                   ! static analysis
eqsl,sparse,,,,,1
cntr,print,1               ! print out contact info and also make no initial contact an error
dmpoption,emat,no             ! Don't combine emat file for DANSYS
dmpoption,esav,no             ! Don't combine esav file for DANSYS
nldiag,cont,iter           ! print out contact info each equilibrium iteration
rescontrol,,none                 ! Do not keep any restart files
/com,****************************************************
/com,******************* SOLVE FOR LS 1 OF 1 ****************
esel,s,type,,2
nsle
sfe,all,1,pres,1,0.
sfe,all,2,pres,1,-6.55508251014097e-004
sfe,all,3,pres,1,0.
esel,s,type,,3
nsle
sfe,all,1,pres,1,0.
sfe,all,2,pres,1,-6.7026021647007e-004
sfe,all,3,pres,1,0.
nsel,all
esel,all
nsub,1,1,1
time,1.
outres,erase
outres,all,none
outres,nsol,all,
outres,rsol,all
outres,strs,all,
outres,epel,all,
outres,eppl,all,
stabilize,off                   ! Stabilization turned OFF by user
! *********** WB SOLVE COMMAND ***********
! check interactive state
*get,ANSINTER_,active,,int
*if,ANSINTER_,ne,0,then
/eof
*endif
solve
/com *************** Write FE CONNECTORS *********
CEWRITE,file,ce,,INTE
/com,****************************************************
/com,*************** FINISHED SOLVE FOR LS 1 *************
/post1
fini
